# $
# automatically generated by /bin/sh
module climate;
class climate {
	double elevation[m];
	double tzoffset[h];
}
object climate {
	city "Anchorage AK";
	tmyfile "AK-Anchorage.tmy2";
	tzoffset -9;
	elevation 35;
}
