# $
# automatically generated by /bin/sh
module climate;
class climate {
	double elevation[m];
	double tzoffset[h];
}
object climate {
	city "Annette AK";
	tmyfile "AK-Annette.tmy2";
	tzoffset -9;
	elevation 34;
}
