# $
# automatically generated by /bin/sh
module climate;
class climate {
	double elevation[m];
	double tzoffset[h];
}
object climate {
	city "Barrow AK";
	tmyfile "AK-Barrow.tmy2";
	tzoffset -9;
	elevation 4;
}
