# $
# automatically generated by /bin/sh
module climate;
class climate {
	double elevation[m];
	double tzoffset[h];
}
object climate {
	city "Bethel AK";
	tmyfile "AK-Bethel.tmy2";
	tzoffset -9;
	elevation 46;
}
