# $
# automatically generated by /bin/sh
module climate;
class climate {
	double elevation[m];
	double tzoffset[h];
}
object climate {
	city "Bettles AK";
	tmyfile "AK-Bettles.tmy2";
	tzoffset -9;
	elevation 205;
}
