# $
# automatically generated by /bin/sh
module climate;
class climate {
	double elevation[m];
	double tzoffset[h];
}
object climate {
	city "Big_delta AK";
	tmyfile "AK-Big_delta.tmy2";
	tzoffset -9;
	elevation 388;
}
