# $
# automatically generated by /bin/sh
module climate;
class climate {
	double elevation[m];
	double tzoffset[h];
}
object climate {
	city "Cold_bay AK";
	tmyfile "AK-Cold_bay.tmy2";
	tzoffset -9;
	elevation 29;
}
