# $
# automatically generated by /bin/sh
module climate;
class climate {
	double elevation[m];
	double tzoffset[h];
}
object climate {
	city "Fairbanks AK";
	tmyfile "AK-Fairbanks.tmy2";
	tzoffset -9;
	elevation 138;
}
