# $
# automatically generated by /bin/sh
module climate;
class climate {
	double elevation[m];
	double tzoffset[h];
}
object climate {
	city "Gulkana AK";
	tmyfile "AK-Gulkana.tmy2";
	tzoffset -9;
	elevation 481;
}
