# $
# automatically generated by /bin/sh
module climate;
class climate {
	double elevation[m];
	double tzoffset[h];
}
object climate {
	city "King_salmon AK";
	tmyfile "AK-King_salmon.tmy2";
	tzoffset -9;
	elevation 15;
}
