# $
# automatically generated by /bin/sh
module climate;
class climate {
	double elevation[m];
	double tzoffset[h];
}
object climate {
	city "Kodiak AK";
	tmyfile "AK-Kodiak.tmy2";
	tzoffset -9;
	elevation 34;
}
