# $
# automatically generated by /bin/sh
module climate;
class climate {
	double elevation[m];
	double tzoffset[h];
}
object climate {
	city "Kotzebue AK";
	tmyfile "AK-Kotzebue.tmy2";
	tzoffset -9;
	elevation 5;
}
