# $
# automatically generated by /bin/sh
module climate;
class climate {
	double elevation[m];
	double tzoffset[h];
}
object climate {
	city "Mcgrath AK";
	tmyfile "AK-Mcgrath.tmy2";
	tzoffset -9;
	elevation 103;
}
