# $
# automatically generated by /bin/sh
module climate;
class climate {
	double elevation[m];
	double tzoffset[h];
}
object climate {
	city "St_paul_is. AK";
	tmyfile "AK-St_paul_is..tmy2";
	tzoffset -10;
	elevation 7;
}
