# $
# automatically generated by /bin/sh
module climate;
class climate {
	double elevation[m];
	double tzoffset[h];
}
object climate {
	city "Talkeetna AK";
	tmyfile "AK-Talkeetna.tmy2";
	tzoffset -9;
	elevation 105;
}
