# $
# automatically generated by /bin/sh
module climate;
class climate {
	double elevation[m];
	double tzoffset[h];
}
object climate {
	city "Yakutat AK";
	tmyfile "AK-Yakutat.tmy2";
	tzoffset -9;
	elevation 9;
}
