# $
# automatically generated by /bin/sh
module climate;
class climate {
	double elevation[m];
	double tzoffset[h];
}
object climate {
	city "Birmingham AL";
	tmyfile "AL-Birmingham.tmy2";
	tzoffset -6;
	elevation 192;
}
