# $
# automatically generated by /bin/sh
module climate;
class climate {
	double elevation[m];
	double tzoffset[h];
}
object climate {
	city "Huntsville AL";
	tmyfile "AL-Huntsville.tmy2";
	tzoffset -6;
	elevation 190;
}
