# $
# automatically generated by /bin/sh
module climate;
class climate {
	double elevation[m];
	double tzoffset[h];
}
object climate {
	city "Mobile AL";
	tmyfile "AL-Mobile.tmy2";
	tzoffset -6;
	elevation 67;
}
