# $
# automatically generated by /bin/sh
module climate;
class climate {
	double elevation[m];
	double tzoffset[h];
}
object climate {
	city "Montgomery AL";
	tmyfile "AL-Montgomery.tmy2";
	tzoffset -6;
	elevation 62;
}
