# $
# automatically generated by /bin/sh
module climate;
class climate {
	double elevation[m];
	double tzoffset[h];
}
object climate {
	city "Fort_smith AR";
	tmyfile "AR-Fort_smith.tmy2";
	tzoffset -6;
	elevation 141;
}
