# $
# automatically generated by /bin/sh
module climate;
class climate {
	double elevation[m];
	double tzoffset[h];
}
object climate {
	city "Little_rock AR";
	tmyfile "AR-Little_rock.tmy2";
	tzoffset -6;
	elevation 81;
}
