# $
# automatically generated by /bin/sh
module climate;
class climate {
	double elevation[m];
	double tzoffset[h];
}
object climate {
	city "Flagstaff AZ";
	tmyfile "AZ-Flagstaff.tmy2";
	tzoffset -7;
	elevation 2135;
}
