# $
# automatically generated by /bin/sh
module climate;
class climate {
	double elevation[m];
	double tzoffset[h];
}
object climate {
	city "Phoenix AZ";
	tmyfile "AZ-Phoenix.tmy2";
	tzoffset -7;
	elevation 339;
}
