# $
# automatically generated by /bin/sh
module climate;
class climate {
	double elevation[m];
	double tzoffset[h];
}
object climate {
	city "Prescott AZ";
	tmyfile "AZ-Prescott.tmy2";
	tzoffset -7;
	elevation 1531;
}
