# $
# automatically generated by /bin/sh
module climate;
class climate {
	double elevation[m];
	double tzoffset[h];
}
object climate {
	city "Tucson AZ";
	tmyfile "AZ-Tucson.tmy2";
	tzoffset -7;
	elevation 779;
}
