# $
# automatically generated by /bin/sh
module climate;
class climate {
	double elevation[m];
	double tzoffset[h];
}
object climate {
	city "Arcata CA";
	tmyfile "CA-Arcata.tmy2";
	tzoffset -8;
	elevation 69;
}
