# $
# automatically generated by /bin/sh
module climate;
class climate {
	double elevation[m];
	double tzoffset[h];
}
object climate {
	city "Bakersfield CA";
	tmyfile "CA-Bakersfield.tmy2";
	tzoffset -8;
	elevation 150;
}
