# $
# automatically generated by /bin/sh
module climate;
class climate {
	double elevation[m];
	double tzoffset[h];
}
object climate {
	city "Daggett CA";
	tmyfile "CA-Daggett.tmy2";
	tzoffset -8;
	elevation 588;
}
