# $
# automatically generated by /bin/sh
module climate;
class climate {
	double elevation[m];
	double tzoffset[h];
}
object climate {
	city "Fresno CA";
	tmyfile "CA-Fresno.tmy2";
	tzoffset -8;
	elevation 100;
}
