# $
# automatically generated by /bin/sh
module climate;
class climate {
	double elevation[m];
	double tzoffset[h];
}
object climate {
	city "Long_beach CA";
	tmyfile "CA-Long_beach.tmy2";
	tzoffset -8;
	elevation 17;
}
