# $
# automatically generated by /bin/sh
module climate;
class climate {
	double elevation[m];
	double tzoffset[h];
}
object climate {
	city "Los_angeles CA";
	tmyfile "CA-Los_angeles.tmy2";
	tzoffset -8;
	elevation 32;
}
