# $
# automatically generated by /bin/sh
module climate;
class climate {
	double elevation[m];
	double tzoffset[h];
}
object climate {
	city "Sacramento CA";
	tmyfile "CA-Sacramento.tmy2";
	tzoffset -8;
	elevation 8;
}
