# $
# automatically generated by /bin/sh
module climate;
class climate {
	double elevation[m];
	double tzoffset[h];
}
object climate {
	city "San_diego CA";
	tmyfile "CA-San_diego.tmy2";
	tzoffset -8;
	elevation 9;
}
