# $
# automatically generated by /bin/sh
module climate;
class climate {
	double elevation[m];
	double tzoffset[h];
}
object climate {
	city "San_francisco CA";
	tmyfile "CA-San_francisco.tmy2";
	tzoffset -8;
	elevation 5;
}
