# $
# automatically generated by /bin/sh
module climate;
class climate {
	double elevation[m];
	double tzoffset[h];
}
object climate {
	city "Santa_maria CA";
	tmyfile "CA-Santa_maria.tmy2";
	tzoffset -8;
	elevation 72;
}
