# $
# automatically generated by /bin/sh
module climate;
class climate {
	double elevation[m];
	double tzoffset[h];
}
object climate {
	city "Alamosa CO";
	tmyfile "CO-Alamosa.tmy2";
	tzoffset -7;
	elevation 2297;
}
