# $
# automatically generated by /bin/sh
module climate;
class climate {
	double elevation[m];
	double tzoffset[h];
}
object climate {
	city "Boulder CO";
	tmyfile "CO-Boulder.tmy2";
	tzoffset -7;
	elevation 1634;
}
