# $
# automatically generated by /bin/sh
module climate;
class climate {
	double elevation[m];
	double tzoffset[h];
}
object climate {
	city "Colorado_springs CO";
	tmyfile "CO-Colorado_springs.tmy2";
	tzoffset -7;
	elevation 1881;
}
