# $
# automatically generated by /bin/sh
module climate;
class climate {
	double elevation[m];
	double tzoffset[h];
}
object climate {
	city "Eagle CO";
	tmyfile "CO-Eagle.tmy2";
	tzoffset -7;
	elevation 1985;
}
