# $
# automatically generated by /bin/sh
module climate;
class climate {
	double elevation[m];
	double tzoffset[h];
}
object climate {
	city "Grand_junction CO";
	tmyfile "CO-Grand_junction.tmy2";
	tzoffset -7;
	elevation 1475;
}
