# $
# automatically generated by /bin/sh
module climate;
class climate {
	double elevation[m];
	double tzoffset[h];
}
object climate {
	city "Pueblo CO";
	tmyfile "CO-Pueblo.tmy2";
	tzoffset -7;
	elevation 1439;
}
