# $
# automatically generated by /bin/sh
module climate;
class climate {
	double elevation[m];
	double tzoffset[h];
}
object climate {
	city "Bridgeport CT";
	tmyfile "CT-Bridgeport.tmy2";
	tzoffset -5;
	elevation 2;
}
