# $
# automatically generated by /bin/sh
module climate;
class climate {
	double elevation[m];
	double tzoffset[h];
}
object climate {
	city "Hartford CT";
	tmyfile "CT-Hartford.tmy2";
	tzoffset -5;
	elevation 55;
}
