# $
# automatically generated by /bin/sh
module climate;
class climate {
	double elevation[m];
	double tzoffset[h];
}
object climate {
	city "Wilmington DE";
	tmyfile "DE-Wilmington.tmy2";
	tzoffset -5;
	elevation 24;
}
