# $
# automatically generated by /bin/sh
module climate;
class climate {
	double elevation[m];
	double tzoffset[h];
}
object climate {
	city "Daytona_beach FL";
	tmyfile "FL-Daytona_beach.tmy2";
	tzoffset -5;
	elevation 12;
}
