# $
# automatically generated by /bin/sh
module climate;
class climate {
	double elevation[m];
	double tzoffset[h];
}
object climate {
	city "Jacksonville FL";
	tmyfile "FL-Jacksonville.tmy2";
	tzoffset -5;
	elevation 9;
}
