# $
# automatically generated by /bin/sh
module climate;
class climate {
	double elevation[m];
	double tzoffset[h];
}
object climate {
	city "Key_west FL";
	tmyfile "FL-Key_west.tmy2";
	tzoffset -5;
	elevation 1;
}
