# $
# automatically generated by /bin/sh
module climate;
class climate {
	double elevation[m];
	double tzoffset[h];
}
object climate {
	city "Miami FL";
	tmyfile "FL-Miami.tmy2";
	tzoffset -5;
	elevation 2;
}
