# $
# automatically generated by /bin/sh
module climate;
class climate {
	double elevation[m];
	double tzoffset[h];
}
object climate {
	city "Tallahassee FL";
	tmyfile "FL-Tallahassee.tmy2";
	tzoffset -5;
	elevation 21;
}
