# $
# automatically generated by /bin/sh
module climate;
class climate {
	double elevation[m];
	double tzoffset[h];
}
object climate {
	city "Tampa FL";
	tmyfile "FL-Tampa.tmy2";
	tzoffset -5;
	elevation 3;
}
