# $
# automatically generated by /bin/sh
module climate;
class climate {
	double elevation[m];
	double tzoffset[h];
}
object climate {
	city "West_palm_beach FL";
	tmyfile "FL-West_palm_beach.tmy2";
	tzoffset -5;
	elevation 6;
}
