# $
# automatically generated by /bin/sh
module climate;
class climate {
	double elevation[m];
	double tzoffset[h];
}
object climate {
	city "Athens GA";
	tmyfile "GA-Athens.tmy2";
	tzoffset -5;
	elevation 244;
}
