# $
# automatically generated by /bin/sh
module climate;
class climate {
	double elevation[m];
	double tzoffset[h];
}
object climate {
	city "Atlanta GA";
	tmyfile "GA-Atlanta.tmy2";
	tzoffset -5;
	elevation 315;
}
