# $
# automatically generated by /bin/sh
module climate;
class climate {
	double elevation[m];
	double tzoffset[h];
}
object climate {
	city "Augusta GA";
	tmyfile "GA-Augusta.tmy2";
	tzoffset -5;
	elevation 45;
}
