# $
# automatically generated by /bin/sh
module climate;
class climate {
	double elevation[m];
	double tzoffset[h];
}
object climate {
	city "Columbus GA";
	tmyfile "GA-Columbus.tmy2";
	tzoffset -5;
	elevation 136;
}
