# $
# automatically generated by /bin/sh
module climate;
class climate {
	double elevation[m];
	double tzoffset[h];
}
object climate {
	city "Macon GA";
	tmyfile "GA-Macon.tmy2";
	tzoffset -5;
	elevation 110;
}
