# $
# automatically generated by /bin/sh
module climate;
class climate {
	double elevation[m];
	double tzoffset[h];
}
object climate {
	city "Savannah GA";
	tmyfile "GA-Savannah.tmy2";
	tzoffset -5;
	elevation 16;
}
