# $
# automatically generated by /bin/sh
module climate;
class climate {
	double elevation[m];
	double tzoffset[h];
}
object climate {
	city "Hilo HI";
	tmyfile "HI-Hilo.tmy2";
	tzoffset -10;
	elevation 11;
}
