# $
# automatically generated by /bin/sh
module climate;
class climate {
	double elevation[m];
	double tzoffset[h];
}
object climate {
	city "Honolulu HI";
	tmyfile "HI-Honolulu.tmy2";
	tzoffset -10;
	elevation 5;
}
