# $
# automatically generated by /bin/sh
module climate;
class climate {
	double elevation[m];
	double tzoffset[h];
}
object climate {
	city "Kahului HI";
	tmyfile "HI-Kahului.tmy2";
	tzoffset -10;
	elevation 15;
}
