# $
# automatically generated by /bin/sh
module climate;
class climate {
	double elevation[m];
	double tzoffset[h];
}
object climate {
	city "Lihue HI";
	tmyfile "HI-Lihue.tmy2";
	tzoffset -10;
	elevation 45;
}
