# $
# automatically generated by /bin/sh
module climate;
class climate {
	double elevation[m];
	double tzoffset[h];
}
object climate {
	city "Des_moines IA";
	tmyfile "IA-Des_moines.tmy2";
	tzoffset -6;
	elevation 294;
}
