# $
# automatically generated by /bin/sh
module climate;
class climate {
	double elevation[m];
	double tzoffset[h];
}
object climate {
	city "Mason_city IA";
	tmyfile "IA-Mason_city.tmy2";
	tzoffset -6;
	elevation 373;
}
