# $
# automatically generated by /bin/sh
module climate;
class climate {
	double elevation[m];
	double tzoffset[h];
}
object climate {
	city "Sioux_city IA";
	tmyfile "IA-Sioux_city.tmy2";
	tzoffset -6;
	elevation 336;
}
