# $
# automatically generated by /bin/sh
module climate;
class climate {
	double elevation[m];
	double tzoffset[h];
}
object climate {
	city "Waterloo IA";
	tmyfile "IA-Waterloo.tmy2";
	tzoffset -6;
	elevation 265;
}
