# $
# automatically generated by /bin/sh
module climate;
class climate {
	double elevation[m];
	double tzoffset[h];
}
object climate {
	city "Boise ID";
	tmyfile "ID-Boise.tmy2";
	tzoffset -7;
	elevation 874;
}
