# $
# automatically generated by /bin/sh
module climate;
class climate {
	double elevation[m];
	double tzoffset[h];
}
object climate {
	city "Pocatello ID";
	tmyfile "ID-Pocatello.tmy2";
	tzoffset -7;
	elevation 1365;
}
