# $
# automatically generated by /bin/sh
module climate;
class climate {
	double elevation[m];
	double tzoffset[h];
}
object climate {
	city "Chicago IL";
	tmyfile "IL-Chicago.tmy2";
	tzoffset -6;
	elevation 190;
}
