# $
# automatically generated by /bin/sh
module climate;
class climate {
	double elevation[m];
	double tzoffset[h];
}
object climate {
	city "Moline IL";
	tmyfile "IL-Moline.tmy2";
	tzoffset -6;
	elevation 181;
}
