# $
# automatically generated by /bin/sh
module climate;
class climate {
	double elevation[m];
	double tzoffset[h];
}
object climate {
	city "Peoria IL";
	tmyfile "IL-Peoria.tmy2";
	tzoffset -6;
	elevation 199;
}
