# $
# automatically generated by /bin/sh
module climate;
class climate {
	double elevation[m];
	double tzoffset[h];
}
object climate {
	city "Rockford IL";
	tmyfile "IL-Rockford.tmy2";
	tzoffset -6;
	elevation 221;
}
