# $
# automatically generated by /bin/sh
module climate;
class climate {
	double elevation[m];
	double tzoffset[h];
}
object climate {
	city "Springfield IL";
	tmyfile "IL-Springfield.tmy2";
	tzoffset -6;
	elevation 187;
}
