# $
# automatically generated by /bin/sh
module climate;
class climate {
	double elevation[m];
	double tzoffset[h];
}
object climate {
	city "Evansville IN";
	tmyfile "IN-Evansville.tmy2";
	tzoffset -6;
	elevation 118;
}
