# $
# automatically generated by /bin/sh
module climate;
class climate {
	double elevation[m];
	double tzoffset[h];
}
object climate {
	city "Fort_wayne IN";
	tmyfile "IN-Fort_wayne.tmy2";
	tzoffset -5;
	elevation 252;
}
