# $
# automatically generated by /bin/sh
module climate;
class climate {
	double elevation[m];
	double tzoffset[h];
}
object climate {
	city "Indianapolis IN";
	tmyfile "IN-Indianapolis.tmy2";
	tzoffset -5;
	elevation 246;
}
