# $
# automatically generated by /bin/sh
module climate;
class climate {
	double elevation[m];
	double tzoffset[h];
}
object climate {
	city "South_bend IN";
	tmyfile "IN-South_bend.tmy2";
	tzoffset -5;
	elevation 236;
}
