# $
# automatically generated by /bin/sh
module climate;
class climate {
	double elevation[m];
	double tzoffset[h];
}
object climate {
	city "Dodge_city KS";
	tmyfile "KS-Dodge_city.tmy2";
	tzoffset -6;
	elevation 787;
}
