# $
# automatically generated by /bin/sh
module climate;
class climate {
	double elevation[m];
	double tzoffset[h];
}
object climate {
	city "Goodland KS";
	tmyfile "KS-Goodland.tmy2";
	tzoffset -7;
	elevation 1124;
}
