# $
# automatically generated by /bin/sh
module climate;
class climate {
	double elevation[m];
	double tzoffset[h];
}
object climate {
	city "Topeka KS";
	tmyfile "KS-Topeka.tmy2";
	tzoffset -6;
	elevation 270;
}
