# $
# automatically generated by /bin/sh
module climate;
class climate {
	double elevation[m];
	double tzoffset[h];
}
object climate {
	city "Wichita KS";
	tmyfile "KS-Wichita.tmy2";
	tzoffset -6;
	elevation 408;
}
