# $
# automatically generated by /bin/sh
module climate;
class climate {
	double elevation[m];
	double tzoffset[h];
}
object climate {
	city "Covington KY";
	tmyfile "KY-Covington.tmy2";
	tzoffset -5;
	elevation 271;
}
