# $
# automatically generated by /bin/sh
module climate;
class climate {
	double elevation[m];
	double tzoffset[h];
}
object climate {
	city "Lexington KY";
	tmyfile "KY-Lexington.tmy2";
	tzoffset -5;
	elevation 301;
}
