# $
# automatically generated by /bin/sh
module climate;
class climate {
	double elevation[m];
	double tzoffset[h];
}
object climate {
	city "Louisville KY";
	tmyfile "KY-Louisville.tmy2";
	tzoffset -5;
	elevation 149;
}
