# $
# automatically generated by /bin/sh
module climate;
class climate {
	double elevation[m];
	double tzoffset[h];
}
object climate {
	city "Baton_rouge LA";
	tmyfile "LA-Baton_rouge.tmy2";
	tzoffset -6;
	elevation 23;
}
