# $
# automatically generated by /bin/sh
module climate;
class climate {
	double elevation[m];
	double tzoffset[h];
}
object climate {
	city "Lake_charles LA";
	tmyfile "LA-Lake_charles.tmy2";
	tzoffset -6;
	elevation 3;
}
