# $
# automatically generated by /bin/sh
module climate;
class climate {
	double elevation[m];
	double tzoffset[h];
}
object climate {
	city "New_orleans LA";
	tmyfile "LA-New_orleans.tmy2";
	tzoffset -6;
	elevation 3;
}
