# $
# automatically generated by /bin/sh
module climate;
class climate {
	double elevation[m];
	double tzoffset[h];
}
object climate {
	city "Shreveport LA";
	tmyfile "LA-Shreveport.tmy2";
	tzoffset -6;
	elevation 79;
}
