# $
# automatically generated by /bin/sh
module climate;
class climate {
	double elevation[m];
	double tzoffset[h];
}
object climate {
	city "Boston MA";
	tmyfile "MA-Boston.tmy2";
	tzoffset -5;
	elevation 5;
}
