# $
# automatically generated by /bin/sh
module climate;
class climate {
	double elevation[m];
	double tzoffset[h];
}
object climate {
	city "Worchester MA";
	tmyfile "MA-Worchester.tmy2";
	tzoffset -5;
	elevation 301;
}
