# $
# automatically generated by /bin/sh
module climate;
class climate {
	double elevation[m];
	double tzoffset[h];
}
object climate {
	city "Baltimore MD";
	tmyfile "MD-Baltimore.tmy2";
	tzoffset -5;
	elevation 47;
}
