# $
# automatically generated by /bin/sh
module climate;
class climate {
	double elevation[m];
	double tzoffset[h];
}
object climate {
	city "Caribou ME";
	tmyfile "ME-Caribou.tmy2";
	tzoffset -5;
	elevation 190;
}
