# $
# automatically generated by /bin/sh
module climate;
class climate {
	double elevation[m];
	double tzoffset[h];
}
object climate {
	city "Portland ME";
	tmyfile "ME-Portland.tmy2";
	tzoffset -5;
	elevation 19;
}
