# $
# automatically generated by /bin/sh
module climate;
class climate {
	double elevation[m];
	double tzoffset[h];
}
object climate {
	city "Alpena MI";
	tmyfile "MI-Alpena.tmy2";
	tzoffset -5;
	elevation 210;
}
