# $
# automatically generated by /bin/sh
module climate;
class climate {
	double elevation[m];
	double tzoffset[h];
}
object climate {
	city "Detroit MI";
	tmyfile "MI-Detroit.tmy2";
	tzoffset -5;
	elevation 191;
}
