# $
# automatically generated by /bin/sh
module climate;
class climate {
	double elevation[m];
	double tzoffset[h];
}
object climate {
	city "Flint MI";
	tmyfile "MI-Flint.tmy2";
	tzoffset -5;
	elevation 233;
}
