# $
# automatically generated by /bin/sh
module climate;
class climate {
	double elevation[m];
	double tzoffset[h];
}
object climate {
	city "Grand_rapids MI";
	tmyfile "MI-Grand_rapids.tmy2";
	tzoffset -5;
	elevation 245;
}
