# $
# automatically generated by /bin/sh
module climate;
class climate {
	double elevation[m];
	double tzoffset[h];
}
object climate {
	city "Houghton MI";
	tmyfile "MI-Houghton.tmy2";
	tzoffset -5;
	elevation 329;
}
