# $
# automatically generated by /bin/sh
module climate;
class climate {
	double elevation[m];
	double tzoffset[h];
}
object climate {
	city "Lansing MI";
	tmyfile "MI-Lansing.tmy2";
	tzoffset -5;
	elevation 256;
}
