# $
# automatically generated by /bin/sh
module climate;
class climate {
	double elevation[m];
	double tzoffset[h];
}
object climate {
	city "Muskegon MI";
	tmyfile "MI-Muskegon.tmy2";
	tzoffset -5;
	elevation 191;
}
