# $
# automatically generated by /bin/sh
module climate;
class climate {
	double elevation[m];
	double tzoffset[h];
}
object climate {
	city "Sault_ste._marie MI";
	tmyfile "MI-Sault_ste._marie.tmy2";
	tzoffset -5;
	elevation 221;
}
