# $
# automatically generated by /bin/sh
module climate;
class climate {
	double elevation[m];
	double tzoffset[h];
}
object climate {
	city "Traverse_city MI";
	tmyfile "MI-Traverse_city.tmy2";
	tzoffset -5;
	elevation 192;
}
