# $
# automatically generated by /bin/sh
module climate;
class climate {
	double elevation[m];
	double tzoffset[h];
}
object climate {
	city "Duluth MN";
	tmyfile "MN-Duluth.tmy2";
	tzoffset -6;
	elevation 432;
}
