# $
# automatically generated by /bin/sh
module climate;
class climate {
	double elevation[m];
	double tzoffset[h];
}
object climate {
	city "International_falls MN";
	tmyfile "MN-International_falls.tmy2";
	tzoffset -6;
	elevation 361;
}
