# $
# automatically generated by /bin/sh
module climate;
class climate {
	double elevation[m];
	double tzoffset[h];
}
object climate {
	city "Minneapolis MN";
	tmyfile "MN-Minneapolis.tmy2";
	tzoffset -6;
	elevation 255;
}
