# $
# automatically generated by /bin/sh
module climate;
class climate {
	double elevation[m];
	double tzoffset[h];
}
object climate {
	city "Rochester MN";
	tmyfile "MN-Rochester.tmy2";
	tzoffset -6;
	elevation 402;
}
