# $
# automatically generated by /bin/sh
module climate;
class climate {
	double elevation[m];
	double tzoffset[h];
}
object climate {
	city "Saint_cloud MN";
	tmyfile "MN-Saint_cloud.tmy2";
	tzoffset -6;
	elevation 313;
}
