# $
# automatically generated by /bin/sh
module climate;
class climate {
	double elevation[m];
	double tzoffset[h];
}
object climate {
	city "Columbia MO";
	tmyfile "MO-Columbia.tmy2";
	tzoffset -6;
	elevation 270;
}
