# $
# automatically generated by /bin/sh
module climate;
class climate {
	double elevation[m];
	double tzoffset[h];
}
object climate {
	city "Kansas_city MO";
	tmyfile "MO-Kansas_city.tmy2";
	tzoffset -6;
	elevation 315;
}
