# $
# automatically generated by /bin/sh
module climate;
class climate {
	double elevation[m];
	double tzoffset[h];
}
object climate {
	city "Springfield MO";
	tmyfile "MO-Springfield.tmy2";
	tzoffset -6;
	elevation 387;
}
