# $
# automatically generated by /bin/sh
module climate;
class climate {
	double elevation[m];
	double tzoffset[h];
}
object climate {
	city "St._louis MO";
	tmyfile "MO-St._louis.tmy2";
	tzoffset -6;
	elevation 172;
}
