# $
# automatically generated by /bin/sh
module climate;
class climate {
	double elevation[m];
	double tzoffset[h];
}
object climate {
	city "Jackson MS";
	tmyfile "MS-Jackson.tmy2";
	tzoffset -6;
	elevation 101;
}
