# $
# automatically generated by /bin/sh
module climate;
class climate {
	double elevation[m];
	double tzoffset[h];
}
object climate {
	city "Meridian MS";
	tmyfile "MS-Meridian.tmy2";
	tzoffset -6;
	elevation 94;
}
