# $
# automatically generated by /bin/sh
module climate;
class climate {
	double elevation[m];
	double tzoffset[h];
}
object climate {
	city "Billings MT";
	tmyfile "MT-Billings.tmy2";
	tzoffset -7;
	elevation 1088;
}
