# $
# automatically generated by /bin/sh
module climate;
class climate {
	double elevation[m];
	double tzoffset[h];
}
object climate {
	city "Cut_bank MT";
	tmyfile "MT-Cut_bank.tmy2";
	tzoffset -7;
	elevation 1170;
}
