# $
# automatically generated by /bin/sh
module climate;
class climate {
	double elevation[m];
	double tzoffset[h];
}
object climate {
	city "Glasgow MT";
	tmyfile "MT-Glasgow.tmy2";
	tzoffset -7;
	elevation 700;
}
