# $
# automatically generated by /bin/sh
module climate;
class climate {
	double elevation[m];
	double tzoffset[h];
}
object climate {
	city "Great_falls MT";
	tmyfile "MT-Great_falls.tmy2";
	tzoffset -7;
	elevation 1116;
}
