# $
# automatically generated by /bin/sh
module climate;
class climate {
	double elevation[m];
	double tzoffset[h];
}
object climate {
	city "Helena MT";
	tmyfile "MT-Helena.tmy2";
	tzoffset -7;
	elevation 1188;
}
