# $
# automatically generated by /bin/sh
module climate;
class climate {
	double elevation[m];
	double tzoffset[h];
}
object climate {
	city "Kalispell MT";
	tmyfile "MT-Kalispell.tmy2";
	tzoffset -7;
	elevation 904;
}
