# $
# automatically generated by /bin/sh
module climate;
class climate {
	double elevation[m];
	double tzoffset[h];
}
object climate {
	city "Lewistown MT";
	tmyfile "MT-Lewistown.tmy2";
	tzoffset -7;
	elevation 1264;
}
