# $
# automatically generated by /bin/sh
module climate;
class climate {
	double elevation[m];
	double tzoffset[h];
}
object climate {
	city "Miles_city MT";
	tmyfile "MT-Miles_city.tmy2";
	tzoffset -7;
	elevation 803;
}
