# $
# automatically generated by /bin/sh
module climate;
class climate {
	double elevation[m];
	double tzoffset[h];
}
object climate {
	city "Missoula MT";
	tmyfile "MT-Missoula.tmy2";
	tzoffset -7;
	elevation 972;
}
