# $
# automatically generated by /bin/sh
module climate;
class climate {
	double elevation[m];
	double tzoffset[h];
}
object climate {
	city "Asheville NC";
	tmyfile "NC-Asheville.tmy2";
	tzoffset -5;
	elevation 661;
}
