# $
# automatically generated by /bin/sh
module climate;
class climate {
	double elevation[m];
	double tzoffset[h];
}
object climate {
	city "Cape_hatteras NC";
	tmyfile "NC-Cape_hatteras.tmy2";
	tzoffset -5;
	elevation 2;
}
