# $
# automatically generated by /bin/sh
module climate;
class climate {
	double elevation[m];
	double tzoffset[h];
}
object climate {
	city "Charlotte NC";
	tmyfile "NC-Charlotte.tmy2";
	tzoffset -5;
	elevation 234;
}
