# $
# automatically generated by /bin/sh
module climate;
class climate {
	double elevation[m];
	double tzoffset[h];
}
object climate {
	city "Greensboro NC";
	tmyfile "NC-Greensboro.tmy2";
	tzoffset -5;
	elevation 270;
}
