# $
# automatically generated by /bin/sh
module climate;
class climate {
	double elevation[m];
	double tzoffset[h];
}
object climate {
	city "Raleigh NC";
	tmyfile "NC-Raleigh.tmy2";
	tzoffset -5;
	elevation 134;
}
