# $
# automatically generated by /bin/sh
module climate;
class climate {
	double elevation[m];
	double tzoffset[h];
}
object climate {
	city "Wilmington NC";
	tmyfile "NC-Wilmington.tmy2";
	tzoffset -5;
	elevation 9;
}
