# $
# automatically generated by /bin/sh
module climate;
class climate {
	double elevation[m];
	double tzoffset[h];
}
object climate {
	city "Bismarck ND";
	tmyfile "ND-Bismarck.tmy2";
	tzoffset -6;
	elevation 502;
}
