# $
# automatically generated by /bin/sh
module climate;
class climate {
	double elevation[m];
	double tzoffset[h];
}
object climate {
	city "Fargo ND";
	tmyfile "ND-Fargo.tmy2";
	tzoffset -6;
	elevation 274;
}
