# $
# automatically generated by /bin/sh
module climate;
class climate {
	double elevation[m];
	double tzoffset[h];
}
object climate {
	city "Minot ND";
	tmyfile "ND-Minot.tmy2";
	tzoffset -6;
	elevation 522;
}
