# $
# automatically generated by /bin/sh
module climate;
class climate {
	double elevation[m];
	double tzoffset[h];
}
object climate {
	city "Grand_island NE";
	tmyfile "NE-Grand_island.tmy2";
	tzoffset -6;
	elevation 566;
}
