# $
# automatically generated by /bin/sh
module climate;
class climate {
	double elevation[m];
	double tzoffset[h];
}
object climate {
	city "Norfolk NE";
	tmyfile "NE-Norfolk.tmy2";
	tzoffset -6;
	elevation 471;
}
