# $
# automatically generated by /bin/sh
module climate;
class climate {
	double elevation[m];
	double tzoffset[h];
}
object climate {
	city "North_platte NE";
	tmyfile "NE-North_platte.tmy2";
	tzoffset -6;
	elevation 849;
}
