# $
# automatically generated by /bin/sh
module climate;
class climate {
	double elevation[m];
	double tzoffset[h];
}
object climate {
	city "Omaha NE";
	tmyfile "NE-Omaha.tmy2";
	tzoffset -6;
	elevation 404;
}
