# $
# automatically generated by /bin/sh
module climate;
class climate {
	double elevation[m];
	double tzoffset[h];
}
object climate {
	city "Scottsbluff NE";
	tmyfile "NE-Scottsbluff.tmy2";
	tzoffset -7;
	elevation 1206;
}
