# $
# automatically generated by /bin/sh
module climate;
class climate {
	double elevation[m];
	double tzoffset[h];
}
object climate {
	city "Concord NH";
	tmyfile "NH-Concord.tmy2";
	tzoffset -5;
	elevation 105;
}
