# $
# automatically generated by /bin/sh
module climate;
class climate {
	double elevation[m];
	double tzoffset[h];
}
object climate {
	city "Atlantic_city NJ";
	tmyfile "NJ-Atlantic_city.tmy2";
	tzoffset -5;
	elevation 20;
}
