# $
# automatically generated by /bin/sh
module climate;
class climate {
	double elevation[m];
	double tzoffset[h];
}
object climate {
	city "Newark NJ";
	tmyfile "NJ-Newark.tmy2";
	tzoffset -5;
	elevation 9;
}
