# $
# automatically generated by /bin/sh
module climate;
class climate {
	double elevation[m];
	double tzoffset[h];
}
object climate {
	city "Albuquerque NM";
	tmyfile "NM-Albuquerque.tmy2";
	tzoffset -7;
	elevation 1619;
}
