# $
# automatically generated by /bin/sh
module climate;
class climate {
	double elevation[m];
	double tzoffset[h];
}
object climate {
	city "Tucumcari NM";
	tmyfile "NM-Tucumcari.tmy2";
	tzoffset -7;
	elevation 1231;
}
