# $
# automatically generated by /bin/sh
module climate;
class climate {
	double elevation[m];
	double tzoffset[h];
}
object climate {
	city "Elko NV";
	tmyfile "NV-Elko.tmy2";
	tzoffset -8;
	elevation 1547;
}
