# $
# automatically generated by /bin/sh
module climate;
class climate {
	double elevation[m];
	double tzoffset[h];
}
object climate {
	city "Ely NV";
	tmyfile "NV-Ely.tmy2";
	tzoffset -8;
	elevation 1906;
}
