# $
# automatically generated by /bin/sh
module climate;
class climate {
	double elevation[m];
	double tzoffset[h];
}
object climate {
	city "Las_vegas NV";
	tmyfile "NV-Las_vegas.tmy2";
	tzoffset -8;
	elevation 664;
}
