# $
# automatically generated by /bin/sh
module climate;
class climate {
	double elevation[m];
	double tzoffset[h];
}
object climate {
	city "Reno NV";
	tmyfile "NV-Reno.tmy2";
	tzoffset -8;
	elevation 1341;
}
