# $
# automatically generated by /bin/sh
module climate;
class climate {
	double elevation[m];
	double tzoffset[h];
}
object climate {
	city "Tonopah NV";
	tmyfile "NV-Tonopah.tmy2";
	tzoffset -8;
	elevation 1653;
}
