# $
# automatically generated by /bin/sh
module climate;
class climate {
	double elevation[m];
	double tzoffset[h];
}
object climate {
	city "Winnemucca NV";
	tmyfile "NV-Winnemucca.tmy2";
	tzoffset -8;
	elevation 1323;
}
