# $
# automatically generated by /bin/sh
module climate;
class climate {
	double elevation[m];
	double tzoffset[h];
}
object climate {
	city "Albany NY";
	tmyfile "NY-Albany.tmy2";
	tzoffset -5;
	elevation 89;
}
