# $
# automatically generated by /bin/sh
module climate;
class climate {
	double elevation[m];
	double tzoffset[h];
}
object climate {
	city "Binghamton NY";
	tmyfile "NY-Binghamton.tmy2";
	tzoffset -5;
	elevation 499;
}
