# $
# automatically generated by /bin/sh
module climate;
class climate {
	double elevation[m];
	double tzoffset[h];
}
object climate {
	city "Buffalo NY";
	tmyfile "NY-Buffalo.tmy2";
	tzoffset -5;
	elevation 215;
}
