# $
# automatically generated by /bin/sh
module climate;
class climate {
	double elevation[m];
	double tzoffset[h];
}
object climate {
	city "Massena NY";
	tmyfile "NY-Massena.tmy2";
	tzoffset -5;
	elevation 63;
}
