# $
# automatically generated by /bin/sh
module climate;
class climate {
	double elevation[m];
	double tzoffset[h];
}
object climate {
	city "New_york_city NY";
	tmyfile "NY-New_york_city.tmy2";
	tzoffset -5;
	elevation 57;
}
