# $
# automatically generated by /bin/sh
module climate;
class climate {
	double elevation[m];
	double tzoffset[h];
}
object climate {
	city "Rochester NY";
	tmyfile "NY-Rochester.tmy2";
	tzoffset -5;
	elevation 169;
}
