# $
# automatically generated by /bin/sh
module climate;
class climate {
	double elevation[m];
	double tzoffset[h];
}
object climate {
	city "Syracuse NY";
	tmyfile "NY-Syracuse.tmy2";
	tzoffset -5;
	elevation 124;
}
