# $
# automatically generated by /bin/sh
module climate;
class climate {
	double elevation[m];
	double tzoffset[h];
}
object climate {
	city "Akron OH";
	tmyfile "OH-Akron.tmy2";
	tzoffset -5;
	elevation 377;
}
