# $
# automatically generated by /bin/sh
module climate;
class climate {
	double elevation[m];
	double tzoffset[h];
}
object climate {
	city "Cleveland OH";
	tmyfile "OH-Cleveland.tmy2";
	tzoffset -5;
	elevation 245;
}
