# $
# automatically generated by /bin/sh
module climate;
class climate {
	double elevation[m];
	double tzoffset[h];
}
object climate {
	city "Columbus OH";
	tmyfile "OH-Columbus.tmy2";
	tzoffset -5;
	elevation 254;
}
