# $
# automatically generated by /bin/sh
module climate;
class climate {
	double elevation[m];
	double tzoffset[h];
}
object climate {
	city "Dayton OH";
	tmyfile "OH-Dayton.tmy2";
	tzoffset -5;
	elevation 306;
}
