# $
# automatically generated by /bin/sh
module climate;
class climate {
	double elevation[m];
	double tzoffset[h];
}
object climate {
	city "Mansfield OH";
	tmyfile "OH-Mansfield.tmy2";
	tzoffset -5;
	elevation 395;
}
