# $
# automatically generated by /bin/sh
module climate;
class climate {
	double elevation[m];
	double tzoffset[h];
}
object climate {
	city "Toledo OH";
	tmyfile "OH-Toledo.tmy2";
	tzoffset -5;
	elevation 211;
}
