# $
# automatically generated by /bin/sh
module climate;
class climate {
	double elevation[m];
	double tzoffset[h];
}
object climate {
	city "Youngstown OH";
	tmyfile "OH-Youngstown.tmy2";
	tzoffset -5;
	elevation 361;
}
