# $
# automatically generated by /bin/sh
module climate;
class climate {
	double elevation[m];
	double tzoffset[h];
}
object climate {
	city "Oklahoma_city OK";
	tmyfile "OK-Oklahoma_city.tmy2";
	tzoffset -6;
	elevation 397;
}
