# $
# automatically generated by /bin/sh
module climate;
class climate {
	double elevation[m];
	double tzoffset[h];
}
object climate {
	city "Tulsa OK";
	tmyfile "OK-Tulsa.tmy2";
	tzoffset -6;
	elevation 206;
}
