# $
# automatically generated by /bin/sh
module climate;
class climate {
	double elevation[m];
	double tzoffset[h];
}
object climate {
	city "Astoria OR";
	tmyfile "OR-Astoria.tmy2";
	tzoffset -8;
	elevation 7;
}
