# $
# automatically generated by /bin/sh
module climate;
class climate {
	double elevation[m];
	double tzoffset[h];
}
object climate {
	city "Burns OR";
	tmyfile "OR-Burns.tmy2";
	tzoffset -8;
	elevation 1271;
}
