# $
# automatically generated by /bin/sh
module climate;
class climate {
	double elevation[m];
	double tzoffset[h];
}
object climate {
	city "Eugene OR";
	tmyfile "OR-Eugene.tmy2";
	tzoffset -8;
	elevation 109;
}
