# $
# automatically generated by /bin/sh
module climate;
class climate {
	double elevation[m];
	double tzoffset[h];
}
object climate {
	city "Medford OR";
	tmyfile "OR-Medford.tmy2";
	tzoffset -8;
	elevation 396;
}
