# $
# automatically generated by /bin/sh
module climate;
class climate {
	double elevation[m];
	double tzoffset[h];
}
object climate {
	city "North_bend OR";
	tmyfile "OR-North_bend.tmy2";
	tzoffset -8;
	elevation 5;
}
