# $
# automatically generated by /bin/sh
module climate;
class climate {
	double elevation[m];
	double tzoffset[h];
}
object climate {
	city "Pendleton OR";
	tmyfile "OR-Pendleton.tmy2";
	tzoffset -8;
	elevation 456;
}
