# $
# automatically generated by /bin/sh
module climate;
class climate {
	double elevation[m];
	double tzoffset[h];
}
object climate {
	city "Portland OR";
	tmyfile "OR-Portland.tmy2";
	tzoffset -8;
	elevation 12;
}
