# $
# automatically generated by /bin/sh
module climate;
class climate {
	double elevation[m];
	double tzoffset[h];
}
object climate {
	city "Redmond OR";
	tmyfile "OR-Redmond.tmy2";
	tzoffset -8;
	elevation 940;
}
