# $
# automatically generated by /bin/sh
module climate;
class climate {
	double elevation[m];
	double tzoffset[h];
}
object climate {
	city "Salem OR";
	tmyfile "OR-Salem.tmy2";
	tzoffset -8;
	elevation 61;
}
