# $
# automatically generated by /bin/sh
module climate;
class climate {
	double elevation[m];
	double tzoffset[h];
}
object climate {
	city "Allentown PA";
	tmyfile "PA-Allentown.tmy2";
	tzoffset -5;
	elevation 117;
}
