# $
# automatically generated by /bin/sh
module climate;
class climate {
	double elevation[m];
	double tzoffset[h];
}
object climate {
	city "Bradford PA";
	tmyfile "PA-Bradford.tmy2";
	tzoffset -5;
	elevation 600;
}
