# $
# automatically generated by /bin/sh
module climate;
class climate {
	double elevation[m];
	double tzoffset[h];
}
object climate {
	city "Erie PA";
	tmyfile "PA-Erie.tmy2";
	tzoffset -5;
	elevation 225;
}
