# $
# automatically generated by /bin/sh
module climate;
class climate {
	double elevation[m];
	double tzoffset[h];
}
object climate {
	city "Harrisburg PA";
	tmyfile "PA-Harrisburg.tmy2";
	tzoffset -5;
	elevation 106;
}
