# $
# automatically generated by /bin/sh
module climate;
class climate {
	double elevation[m];
	double tzoffset[h];
}
object climate {
	city "Philadelphia PA";
	tmyfile "PA-Philadelphia.tmy2";
	tzoffset -5;
	elevation 9;
}
