# $
# automatically generated by /bin/sh
module climate;
class climate {
	double elevation[m];
	double tzoffset[h];
}
object climate {
	city "Pittsburgh PA";
	tmyfile "PA-Pittsburgh.tmy2";
	tzoffset -5;
	elevation 373;
}
