# $
# automatically generated by /bin/sh
module climate;
class climate {
	double elevation[m];
	double tzoffset[h];
}
object climate {
	city "Wilkes-barre PA";
	tmyfile "PA-Wilkes-barre.tmy2";
	tzoffset -5;
	elevation 289;
}
