# $
# automatically generated by /bin/sh
module climate;
class climate {
	double elevation[m];
	double tzoffset[h];
}
object climate {
	city "Williamsport PA";
	tmyfile "PA-Williamsport.tmy2";
	tzoffset -5;
	elevation 243;
}
