# $
# automatically generated by /bin/sh
module climate;
class climate {
	double elevation[m];
	double tzoffset[h];
}
object climate {
	city "Guam PI";
	tmyfile "PI-Guam.tmy2";
	tzoffset 10;
	elevation 110;
}
