# $
# automatically generated by /bin/sh
module climate;
class climate {
	double elevation[m];
	double tzoffset[h];
}
object climate {
	city "San_juan PR";
	tmyfile "PR-San_juan.tmy2";
	tzoffset -4;
	elevation 19;
}
