# $
# automatically generated by /bin/sh
module climate;
class climate {
	double elevation[m];
	double tzoffset[h];
}
object climate {
	city "Providence RI";
	tmyfile "RI-Providence.tmy2";
	tzoffset -5;
	elevation 19;
}
