# $
# automatically generated by /bin/sh
module climate;
class climate {
	double elevation[m];
	double tzoffset[h];
}
object climate {
	city "Charleston SC";
	tmyfile "SC-Charleston.tmy2";
	tzoffset -5;
	elevation 12;
}
