# $
# automatically generated by /bin/sh
module climate;
class climate {
	double elevation[m];
	double tzoffset[h];
}
object climate {
	city "Columbia SC";
	tmyfile "SC-Columbia.tmy2";
	tzoffset -5;
	elevation 69;
}
