# $
# automatically generated by /bin/sh
module climate;
class climate {
	double elevation[m];
	double tzoffset[h];
}
object climate {
	city "Greenville SC";
	tmyfile "SC-Greenville.tmy2";
	tzoffset -5;
	elevation 296;
}
