# $
# automatically generated by /bin/sh
module climate;
class climate {
	double elevation[m];
	double tzoffset[h];
}
object climate {
	city "Huron SD";
	tmyfile "SD-Huron.tmy2";
	tzoffset -6;
	elevation 393;
}
