# $
# automatically generated by /bin/sh
module climate;
class climate {
	double elevation[m];
	double tzoffset[h];
}
object climate {
	city "Pierre SD";
	tmyfile "SD-Pierre.tmy2";
	tzoffset -6;
	elevation 526;
}
