# $
# automatically generated by /bin/sh
module climate;
class climate {
	double elevation[m];
	double tzoffset[h];
}
object climate {
	city "Rapid_city SD";
	tmyfile "SD-Rapid_city.tmy2";
	tzoffset -7;
	elevation 966;
}
