# $
# automatically generated by /bin/sh
module climate;
class climate {
	double elevation[m];
	double tzoffset[h];
}
object climate {
	city "Sioux_falls SD";
	tmyfile "SD-Sioux_falls.tmy2";
	tzoffset -6;
	elevation 435;
}
