# $
# automatically generated by /bin/sh
module climate;
class climate {
	double elevation[m];
	double tzoffset[h];
}
object climate {
	city "Bristol TN";
	tmyfile "TN-Bristol.tmy2";
	tzoffset -5;
	elevation 459;
}
