# $
# automatically generated by /bin/sh
module climate;
class climate {
	double elevation[m];
	double tzoffset[h];
}
object climate {
	city "Chattanooga TN";
	tmyfile "TN-Chattanooga.tmy2";
	tzoffset -5;
	elevation 210;
}
