# $
# automatically generated by /bin/sh
module climate;
class climate {
	double elevation[m];
	double tzoffset[h];
}
object climate {
	city "Knoxville TN";
	tmyfile "TN-Knoxville.tmy2";
	tzoffset -5;
	elevation 299;
}
