# $
# automatically generated by /bin/sh
module climate;
class climate {
	double elevation[m];
	double tzoffset[h];
}
object climate {
	city "Memphis TN";
	tmyfile "TN-Memphis.tmy2";
	tzoffset -6;
	elevation 87;
}
