# $
# automatically generated by /bin/sh
module climate;
class climate {
	double elevation[m];
	double tzoffset[h];
}
object climate {
	city "Nashville TN";
	tmyfile "TN-Nashville.tmy2";
	tzoffset -6;
	elevation 180;
}
