# $
# automatically generated by /bin/sh
module climate;
class climate {
	double elevation[m];
	double tzoffset[h];
}
object climate {
	city "Abilene TX";
	tmyfile "TX-Abilene.tmy2";
	tzoffset -6;
	elevation 534;
}
