# $
# automatically generated by /bin/sh
module climate;
class climate {
	double elevation[m];
	double tzoffset[h];
}
object climate {
	city "Amarillo TX";
	tmyfile "TX-Amarillo.tmy2";
	tzoffset -6;
	elevation 1098;
}
