# $
# automatically generated by /bin/sh
module climate;
class climate {
	double elevation[m];
	double tzoffset[h];
}
object climate {
	city "Austin TX";
	tmyfile "TX-Austin.tmy2";
	tzoffset -6;
	elevation 189;
}
