# $
# automatically generated by /bin/sh
module climate;
class climate {
	double elevation[m];
	double tzoffset[h];
}
object climate {
	city "Brownsville TX";
	tmyfile "TX-Brownsville.tmy2";
	tzoffset -6;
	elevation 6;
}
