# $
# automatically generated by /bin/sh
module climate;
class climate {
	double elevation[m];
	double tzoffset[h];
}
object climate {
	city "Corpus_christi TX";
	tmyfile "TX-Corpus_christi.tmy2";
	tzoffset -6;
	elevation 13;
}
