# $
# automatically generated by /bin/sh
module climate;
class climate {
	double elevation[m];
	double tzoffset[h];
}
object climate {
	city "El_paso TX";
	tmyfile "TX-El_paso.tmy2";
	tzoffset -7;
	elevation 1194;
}
