# $
# automatically generated by /bin/sh
module climate;
class climate {
	double elevation[m];
	double tzoffset[h];
}
object climate {
	city "Fort_worth TX";
	tmyfile "TX-Fort_worth.tmy2";
	tzoffset -6;
	elevation 164;
}
