# $
# automatically generated by /bin/sh
module climate;
class climate {
	double elevation[m];
	double tzoffset[h];
}
object climate {
	city "Houston TX";
	tmyfile "TX-Houston.tmy2";
	tzoffset -6;
	elevation 33;
}
