# $
# automatically generated by /bin/sh
module climate;
class climate {
	double elevation[m];
	double tzoffset[h];
}
object climate {
	city "Lubbock TX";
	tmyfile "TX-Lubbock.tmy2";
	tzoffset -6;
	elevation 988;
}
