# $
# automatically generated by /bin/sh
module climate;
class climate {
	double elevation[m];
	double tzoffset[h];
}
object climate {
	city "Lufkin TX";
	tmyfile "TX-Lufkin.tmy2";
	tzoffset -6;
	elevation 96;
}
