# $
# automatically generated by /bin/sh
module climate;
class climate {
	double elevation[m];
	double tzoffset[h];
}
object climate {
	city "Midland TX";
	tmyfile "TX-Midland.tmy2";
	tzoffset -6;
	elevation 871;
}
