# $
# automatically generated by /bin/sh
module climate;
class climate {
	double elevation[m];
	double tzoffset[h];
}
object climate {
	city "Port_arthur TX";
	tmyfile "TX-Port_arthur.tmy2";
	tzoffset -6;
	elevation 7;
}
