# $
# automatically generated by /bin/sh
module climate;
class climate {
	double elevation[m];
	double tzoffset[h];
}
object climate {
	city "San_angelo TX";
	tmyfile "TX-San_angelo.tmy2";
	tzoffset -6;
	elevation 582;
}
