# $
# automatically generated by /bin/sh
module climate;
class climate {
	double elevation[m];
	double tzoffset[h];
}
object climate {
	city "San_antonio TX";
	tmyfile "TX-San_antonio.tmy2";
	tzoffset -6;
	elevation 242;
}
