# $
# automatically generated by /bin/sh
module climate;
class climate {
	double elevation[m];
	double tzoffset[h];
}
object climate {
	city "Victoria TX";
	tmyfile "TX-Victoria.tmy2";
	tzoffset -6;
	elevation 32;
}
