# $
# automatically generated by /bin/sh
module climate;
class climate {
	double elevation[m];
	double tzoffset[h];
}
object climate {
	city "Waco TX";
	tmyfile "TX-Waco.tmy2";
	tzoffset -6;
	elevation 155;
}
