# $
# automatically generated by /bin/sh
module climate;
class climate {
	double elevation[m];
	double tzoffset[h];
}
object climate {
	city "Wichita_falls TX";
	tmyfile "TX-Wichita_falls.tmy2";
	tzoffset -6;
	elevation 314;
}
