# $
# automatically generated by /bin/sh
module climate;
class climate {
	double elevation[m];
	double tzoffset[h];
}
object climate {
	city "Cedar_city UT";
	tmyfile "UT-Cedar_city.tmy2";
	tzoffset -7;
	elevation 1712;
}
