# $
# automatically generated by /bin/sh
module climate;
class climate {
	double elevation[m];
	double tzoffset[h];
}
object climate {
	city "Salt_lake_city UT";
	tmyfile "UT-Salt_lake_city.tmy2";
	tzoffset -7;
	elevation 1288;
}
