# $
# automatically generated by /bin/sh
module climate;
class climate {
	double elevation[m];
	double tzoffset[h];
}
object climate {
	city "Lynchburg VA";
	tmyfile "VA-Lynchburg.tmy2";
	tzoffset -5;
	elevation 279;
}
