# $
# automatically generated by /bin/sh
module climate;
class climate {
	double elevation[m];
	double tzoffset[h];
}
object climate {
	city "Norfolk VA";
	tmyfile "VA-Norfolk.tmy2";
	tzoffset -5;
	elevation 9;
}
