# $
# automatically generated by /bin/sh
module climate;
class climate {
	double elevation[m];
	double tzoffset[h];
}
object climate {
	city "Richmond VA";
	tmyfile "VA-Richmond.tmy2";
	tzoffset -5;
	elevation 50;
}
