# $
# automatically generated by /bin/sh
module climate;
class climate {
	double elevation[m];
	double tzoffset[h];
}
object climate {
	city "Roanoke VA";
	tmyfile "VA-Roanoke.tmy2";
	tzoffset -5;
	elevation 358;
}
