# $
# automatically generated by /bin/sh
module climate;
class climate {
	double elevation[m];
	double tzoffset[h];
}
object climate {
	city "Sterling VA";
	tmyfile "VA-Sterling.tmy2";
	tzoffset -5;
	elevation 82;
}
