# $
# automatically generated by /bin/sh
module climate;
class climate {
	double elevation[m];
	double tzoffset[h];
}
object climate {
	city "Burlington VT";
	tmyfile "VT-Burlington.tmy2";
	tzoffset -5;
	elevation 104;
}
