# $
# automatically generated by /bin/sh
module climate;
class climate {
	double elevation[m];
	double tzoffset[h];
}
object climate {
	city "Olympia WA";
	tmyfile "WA-Olympia.tmy2";
	tzoffset -8;
	elevation 61;
}
