# $
# automatically generated by /bin/sh
module climate;
class climate {
	double elevation[m];
	double tzoffset[h];
}
object climate {
	city "Quillayute WA";
	tmyfile "WA-Quillayute.tmy2";
	tzoffset -8;
	elevation 55;
}
