# $
# automatically generated by /bin/sh
module climate;
class climate {
	double elevation[m];
	double tzoffset[h];
}
object climate {
	city "Seattle WA";
	tmyfile "WA-Seattle.tmy2";
	tzoffset -8;
	elevation 122;
}
