# $
# automatically generated by /bin/sh
module climate;
class climate {
	double elevation[m];
	double tzoffset[h];
}
object climate {
	city "Spokane WA";
	tmyfile "WA-Spokane.tmy2";
	tzoffset -8;
	elevation 721;
}
