# $
# automatically generated by /bin/sh
module climate;
class climate {
	double elevation[m];
	double tzoffset[h];
}
object climate {
	city "Yakima WA";
	tmyfile "WA-Yakima.tmy2";
	tzoffset -8;
	elevation 325;
}
