# $
# automatically generated by /bin/sh
module climate;
class climate {
	double elevation[m];
	double tzoffset[h];
}
object climate {
	city "Eau_claire WI";
	tmyfile "WI-Eau_claire.tmy2";
	tzoffset -6;
	elevation 273;
}
