# $
# automatically generated by /bin/sh
module climate;
class climate {
	double elevation[m];
	double tzoffset[h];
}
object climate {
	city "Green_bay WI";
	tmyfile "WI-Green_bay.tmy2";
	tzoffset -6;
	elevation 214;
}
