# $
# automatically generated by /bin/sh
module climate;
class climate {
	double elevation[m];
	double tzoffset[h];
}
object climate {
	city "La_crosse WI";
	tmyfile "WI-La_crosse.tmy2";
	tzoffset -6;
	elevation 205;
}
