# $
# automatically generated by /bin/sh
module climate;
class climate {
	double elevation[m];
	double tzoffset[h];
}
object climate {
	city "Madison WI";
	tmyfile "WI-Madison.tmy2";
	tzoffset -6;
	elevation 262;
}
