# $
# automatically generated by /bin/sh
module climate;
class climate {
	double elevation[m];
	double tzoffset[h];
}
object climate {
	city "Milwaukee WI";
	tmyfile "WI-Milwaukee.tmy2";
	tzoffset -6;
	elevation 211;
}
