# $
# automatically generated by /bin/sh
module climate;
class climate {
	double elevation[m];
	double tzoffset[h];
}
object climate {
	city "Elkins WV";
	tmyfile "WV-Elkins.tmy2";
	tzoffset -5;
	elevation 594;
}
