# $
# automatically generated by /bin/sh
module climate;
class climate {
	double elevation[m];
	double tzoffset[h];
}
object climate {
	city "Huntington WV";
	tmyfile "WV-Huntington.tmy2";
	tzoffset -5;
	elevation 255;
}
