# $
# automatically generated by /bin/sh
module climate;
class climate {
	double elevation[m];
	double tzoffset[h];
}
object climate {
	city "Casper WY";
	tmyfile "WY-Casper.tmy2";
	tzoffset -7;
	elevation 1612;
}
