# $
# automatically generated by /bin/sh
module climate;
class climate {
	double elevation[m];
	double tzoffset[h];
}
object climate {
	city "Cheyenne WY";
	tmyfile "WY-Cheyenne.tmy2";
	tzoffset -7;
	elevation 1872;
}
