# $
# automatically generated by /bin/sh
module climate;
class climate {
	double elevation[m];
	double tzoffset[h];
}
object climate {
	city "Lander WY";
	tmyfile "WY-Lander.tmy2";
	tzoffset -7;
	elevation 1696;
}
