# $
# automatically generated by /bin/sh
module climate;
class climate {
	double elevation[m];
	double tzoffset[h];
}
object climate {
	city "Rock_springs WY";
	tmyfile "WY-Rock_springs.tmy2";
	tzoffset -7;
	elevation 2056;
}
