# $
# automatically generated by /bin/sh
module climate;
class climate {
	double elevation[m];
	double tzoffset[h];
}
object climate {
	city "Sheridan WY";
	tmyfile "WY-Sheridan.tmy2";
	tzoffset -7;
	elevation 1209;
}
