// $Id: test-commercial-1_0.glm 1182 2008-12-22 22:08:36Z dchassin $
// Copyright (C) 2008 Battelle Memorial Institute
// commercial single-zone office test
//

clock {
	timestamp '2001-01-01 0:00:00';
	timezone PST+8PDT;
}

module climate;
object climate {
	name weather;
	tmyfile LosAngeles.tmy2;
}

module commercial;
object office:..10 {
	floor_area random.normal(100000,10000) sf;
	floor_height 10 ft;
	interior_mass random.normal(500000,50000) Btu/degF;
	interior_ua random.normal(75000,7500) Btu/degF/h;
	exterior_ua random.normal(15000,1500) Btu/degF/h;
	hvac.heating.balance_temperature random.normal(60,2) degF;
	hvac.heating.design_temperature random.normal(25,2) degF;
	hvac.cooling.balance_temperature random.normal(70,2) degF;
	hvac.cooling.design_temperature random.normal(100,2) degF;
	air_temperature random.normal(75,1) degF;
	mass_temperature random.normal(75,1) degF;
	glazing.south 5000 sf;
	glazing.east 5000 sf;
	glazing.west 5000 sf;
	glazing.north 5000 sf;
	glazing.coefficient 0.5;
}

module tape;

object recorder {
	parent weather;
	property temperature,solar_flux;
	interval 3600;
	limit 8760;
	file weather.csv;
}

#ifdef recorder
object collector {
	group class=office;
	property sum(power.real),max(air_temperature,min(air_temperature),avg(air_temperature),max(mass_temperature),min(mass_temperature),avg(mass_temperature);
	interval 3600; # hourly samples
	limit 8760; # 1 year of data
	file total.csv;
}
object recorder {
	parent office:1;
	property hvac.mode,air_temperature,mass_temperature,temperature_change,Qh,Qs,Qi,power;
	interval 0;
	file office.csv;
}
#endif
