// gui example 3

#define AVG_SF=2500
#define STD_SF=500

module residential {
	implicit_enduses LIGHTS;
}

gui {
	title value "GUI Example 3";
	row {
		text value "End-uses enabled";
		span { size 3; check global residential::implicit_enduses; }
	}
	row {
		text value "Mean floor area";
		span { size 3; input global AVG_SF; }
	}
	row {
		text value "Stdev floor area";
		span { size 3; input global STD_SF; }
	}
	row {
		text value "example.csv";
		browse {
			source "example.csv";
			height 5;
			width 40;
		}
		table {
			source "data.csv";
			height 10;
			options "rules=all border=0 cellpadding=5";
		}
		graph {
			source "example.csv";
			height 150;
			width 200;
		}
	}
}

#print "Floor area is ${AVG_SF} +/- ${STD_SF} sf"

object house:..10 {
	floor_area random.normal(${AVG_SF},${STD_SF});
}
