// Design a market to test the bidding period, latency, and market identifier of the auction object.
// Use equal period and latency values for this first test. Submit bids into the system throughout the bidding period.
// Ensure the market is closing bidding and clearing on the proper timing interval.
// Once this market has cleared, ensure it does not become active (in the current outputs) until the latency period has expired.

#set tmp=../test_market_auction_timing_1
#setenv GRIDLABD=../../../core

module tape;
module market;
module assert;

clock {
	timezone PST+8PDT;
	starttime '2001-01-01 00:00:00';
	stoptime '2001-01-02 00:00:00';
}

schedule buyer_price {
	* * * * * 10;
}

schedule seller_1_price {
	* 0-5 * * * 10;
	* 6-8 * * * 30;
	* 9-17 * * * 15;
	* 18-21 * * * 20;
	* 22-23 * * * 70;
}

schedule seller_2_price {
	* 0-5 * * * 20;
	* 6-8 * * * 40;
	* 9-17 * * * 20;
	* 18-21 * * * 30;
	* 22-23 * * * 80;
}

schedule seller_3_price {
	* 0-5 * * * 40;
	* 6-8 * * * 60;
	* 9-17 * * * 40;
	* 18-21 * * * 50;
	* 22-23 * * * 100;
}

schedule buyer_quantity {
	* 0-5 * * * 1;
	* 6-8 * * * 5;
	* 9-17 * * * 2;
	* 18-21 * * * 10;
	* 22-23 * * * 3;
}

schedule seller_quantity {
	* 0-5 * * * 3;
	* 6-8 * * * 7;
	* 9-17 * * * 2;
	* 18-21 * * * 15;
	* 22-23 * * * 3;
}

object auction {
	name Market_1;
	latency 1800;
	warmup 0;

	unit MWh;
	period 1800;
	init_price 0;
	verbose TRUE;
	special_mode NONE;
	object recorder {
		property current_market.clearing_price,current_market.clearing_quantity;
		file "test_market_timing_1.csv";
		interval 1800;
		limit 168;
	};
	object double_assert{
		target "current_market.clearing_price";
		in '2001-01-01 00:00:00';
		out '2001-01-01 00:30:00';
		status ASSERT_TRUE;
		value 0;
		within 0.001; // asserting clearing price within 1 percent of result
	};
	object double_assert{
		target "current_market.clearing_price";
		in '2001-01-01 01:00:00';
		out '2001-01-01 06:30:00';
		status ASSERT_TRUE;
		value 10;
		within 0.001; // asserting clearing price within 1 percent of result
	};
	object double_assert{
		target "current_market.clearing_price";
		in '2001-01-01 23:00:00';
		out '2001-01-02 00:00:00';
		status ASSERT_TRUE;
		value 60;
		within 0.001; // asserting clearing price within 1 percent of result
	};
}

object stub_bidder {
	name buyer_1;
	role BUYER;
	bid_period 1800;
	market Market_1;
	price buyer_price*1;
	quantity buyer_quantity*1;
	count 10000;
}

object stub_bidder {
	name buyer_2;
	role BUYER;
	bid_period 900;
	market Market_1;
	price buyer_price*3;
	quantity buyer_quantity*1;
	count 10000;
}

object stub_bidder {
	name buyer_3;
	role BUYER;
	bid_period 300;
	market Market_1;
	price buyer_price*5;
	quantity buyer_quantity*1;
	count 10000;
}

object stub_bidder {
	name seller_1;
	role SELLER;
	bid_period 1800;
	market Market_1;
	price seller_1_price*1;
	quantity seller_quantity*1;
	count 10000;
}

object stub_bidder {
	name seller_2;
	role SELLER;
	bid_period 900;
	market Market_1;
	price seller_2_price*1;
	quantity seller_quantity*1;
	count 10000;
}

object stub_bidder {
	name seller_3;
	role SELLER;
	bid_period 300;
	market Market_1;
	price seller_3_price*1;
	quantity seller_quantity*1;
	count 10000;
}
