////////////////////////////////////////////////////////////////////////////////////////////////////////////////
// BEGIN
////////////////////////////////////////////////////////////////////////////////////////////////////////////////

#set savefile="pnnl14bus.xml"
#set iteration_limit=1000

clock {
	timestamp '2000-01-01 0:00:00';
}

////////////////////////////////////////////////////////////////////////////////////////////////////////////////
// modules
module network {
	acceleration_factor 1.4;
	convergence_limit 0.001;
}

////////////////////////////////////////////////////////////////////////////////////////////////////////////////
// PNNL 14 Bus Test
//

import network pnnl14bus.cdf;

#ifdef TAPE
module tape;
object player {
	file ${TAPE};
	loop 50000;
}
#endif
