// $Id: test_refrigerator_implicit.glm 4738 2014-07-03 00:55:39Z dchassin $
// Test implicit refrigerator
//

#set suppress_repeat_messages=0

#define stylesheet="C:\Project Files\Gridlabd\gridlab-d\trunk\VS2005\gridlabd-2_0.xsl"

clock {
	timezone PST+8PDT;
	starttime '2001-01-01 00:00:00 PST';
	stoptime '2002-01-01 00:00:00 PST';
}

module residential {
	implicit_enduses REFRIGERATOR;
}

module assert;
module tape;

object house{
	// assert needed here
}
